# [component: outputs ElementCounts]
# [component: outputs Prices]
n := 1
M := ElementCounts
Y := Prices
R := regress(M, Y, n)
R = [3; 3; 1; -0.982856; 0.000406954; 6.5723e-5; 0.000969071; 0.000418998; -0.00134847; 0.0730246; 0.0113617; 0.257403; -0.630301; 0.0199511; 0.0199511; -0.000137138; -0.0174008; 2.71462e-5; -0.0107669; 0.306535; 2.03481]
# annotation to a formula above: Fitting n-dimensional data to a higher order polynomial.
Nterms(nvar, deg) := (nvar + deg)!/(deg!*nvar!)
# The number of variables of the polynomial is:
Nvars := cols(M)
# The number of data points is:
Ndata := rows(M)
# The degree of the fitting function:
deg := n
Step(v, Nvar, deg) :=
    if Nvar == 1
        for i ∈ 0 .. deg
            v[i, 0] ← v[i, 0] + i
    if deg == 1
        for i ∈ 0 .. Nvar - 1
            v[i, i] ← v[i, i] + 1
    otherwise
        inc ← Nterms(Nvar, deg - 1)
        for i ∈ 0 .. inc - 1
            v[i, Nvar - 1] ← v[i, Nvar - 1] + 1
        v ← stack(Step(submatrix(v, 0, inc - 1, 0, cols(v) - 1), Nvar, deg - 1), Step(submatrix(v, inc, rows(v) - 1, 0, cols(v) - 1), Nvar - 1, deg))
    v
COrder(Nvar, deg) :=
    v[Nterms(Nvar, deg) - 1, Nvar - 1] ← 0
    Step(v, Nvar, deg)
# Call the program COrder(Nvars, deg) using the definitions above, and strip the vector, R, of its first three terms.
coeffs := submatrix(R, 3, rows(R) - 1, 0, 0)
I := COrder(Nvars, deg)
I = [
    1, 0, 0, 0, 0, 0, 0, 0, 0, 0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;
    0, 1, 0, 0, 0, 0, 0, 0, 0, 0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;
    0, 0, 1, 0, 0, 0, 0, 0, 0, 0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;
    0, 0, 0, 1, 0, 0, 0, 0, 0, 0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;
    0, 0, 0, 0, 1, 0, 0, 0, 0, 0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;
    0, 0, 0, 0, 0, 1, 0, 0, 0, 0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;
    0, 0, 0, 0, 0, 0, 1, 0, 0, 0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;
    0, 0, 0, 0, 0, 0, 0, 1, 0, 0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;
    0, 0, 0, 0, 0, 0, 0, 0, 1, 0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;
    0, 0, 0, 0, 0, 0, 0, 0, 0, 1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;
    0, 0, 0, 0, 0, 0, 0, 0, 0, 0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;
    0, 0, 0, 0, 0, 0, 0, 0, 0, 0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;
    0, 0, 0, 0, 0, 0, 0, 0, 0, 0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;
    0, 0, 0, 0, 0, 0, 0, 0, 0, 0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;
    0, 0, 0, 0, 0, 0, 0, 0, 0, 0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;
    0, 0, 0, 0, 0, 0, 0, 0, 0, 0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;
    0, 0, 0, 0, 0, 0, 0, 0, 0, 0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;
    0, 0, 0, 0, 0, 0, 0, 0, 0, 0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]
coeffs = [-0.982856; 0.000406954; 6.5723e-5; 0.000969071; 0.000418998; -0.00134847; 0.0730246; 0.0113617; 0.257403; -0.630301; 0.0199511; 0.0199511; -0.000137138; -0.0174008; 2.71462e-5; -0.0107669; 0.306535; 2.03481]
